units lj
atom_style bond
boundary p p p
special_bonds fene
atom_modify map yes
variable EQUIL_STEPS index 500000
variable TRAJ_EVERY index 10000
variable NETWORK_EVERY index 10000
variable VELOCITY_SEED index 1
variable LANGEVIN_SEED index 2
variable KINETICS_SEED index 3
variable TRAJ_EXT index lammpstrj
variable block equal ${NETWORK_EVERY}
read_data ${DATA}
group stickers type 2
group stars type 1 2
bond_style fene
bond_coeff 1 30 1.5 1 1
variable rwca equal 2.0^(1.0/6.0)
pair_style hybrid/overlay lj/cut ${rwca} associating
pair_coeff * * lj/cut 1 1 ${rwca}
pair_coeff * * associating 30 1.5 8
neighbor 0.6 bin
neigh_modify every 1 delay 1 check yes
comm_modify vel yes
timestep 0.01
velocity all create 1.0 ${VELOCITY_SEED} mom yes rot yes dist gaussian
fix integrate all nve
fix thermostat all langevin 1 1 2 ${LANGEVIN_SEED} zero yes
fix kinetics stickers associating/kinetics 100 ${KINETICS_SEED} 10 4 1 ${rwca}
reset_atoms image stars
variable t equal temp
variable ep equal pe
fix diag all ave/time 1000 1 1000 v_t v_ep f_kinetics[1] f_kinetics[2] f_kinetics[3] file equil.diagnostics mode scalar ave one
dump traj stars custom ${TRAJ_EVERY} equil.${TRAJ_EXT} id mol type xu yu zu
dump_modify traj sort id
thermo 1000
thermo_style custom step temp pe f_kinetics[1] f_kinetics[2] f_kinetics[3]
thermo_modify norm no
variable nblock equal floor(v_EQUIL_STEPS/v_block)
if "${nblock} > 0" then "jump SELF full_loop"
jump SELF after_full
label full_loop
variable i loop ${nblock}
label loop
run ${block}
variable s equal step
write_associating_network equil.network.${s}.dat fix kinetics
next i
jump SELF loop
label after_full
variable rem equal v_EQUIL_STEPS-v_nblock*v_block
if "${rem} > 0" then "run ${rem}"
variable s equal step
if "${rem} > 0" then "write_associating_network equil.network.${s}.dat fix kinetics"
write_restart equil.restart
