# 3d Lennard-Jones melt

units		lj
atom_style	atomic

lattice		fcc 0.8442
region		box block 0 10 0 10 0 10
create_box	1 box
create_atoms	1 box
mass		1 1.0

velocity	all create 1.44 87287 loop geom

pair_style	lj/cut 2.5
pair_coeff	1 1 1.0 1.0 2.5

neighbor	0.3 bin
neigh_modify	delay 0 every 20 check no

fix		1 all nve

compute         p all pressure thermo_temp

fix             gcorr all ave/correlate 1 100 100 &
                c_p &
                type auto title1 "Shear Stress Autocorrelations" &
                file tmp.corr

#fix             gcorr all ave/correlate/long 1 100 &
#                c_p &
#                type auto title1 "Shear Stress Autocorrelations" &
#                nlen 16 ncount 2 ncorr 30 &
#                file tmp.corr overwrite

run		100

write_restart   tmp.restart
